// COMSOL Multiphysics 6.1.0.252 model "cwt_solver_20240922.mph"
// Outline of the model tree

Parameters
  L = 50*a
  a = 0.2781758129442022
  resolution = 17
  init_eig_guess = -0.14002186913271342+0.001235795458208994j

Couplings
  intop1: Integration "积分 1" on domains 1-3 | opname = intleftb
  intop2: Integration "积分 2" on domains 7-9 | opname = intrightb
  intop3: Integration "积分 3" on domains 1, 4, 7 | opname = intlowb
  intop4: Integration "积分 4" on domains 3, 6, 9 | opname = intupb
  intop5: Integration "积分 5" on domains 1-9 | opname = intall
  intop6: Integration "积分 6" on boundaries 1, 3, 5, 22-24 | opname = intyd
  intop7: Integration "积分 7" on boundaries 2, 7, 9, 14, 16, 21 | opname = intxd

Coordinate systems
  sys1: Boundary "边界坐标系 1"

Geometry
  geom1 "几何 1" (2D, length unit m)
    r1: Rectangle "矩形 1" | base = center; size = {L, L}
    r2: Rectangle "矩形 2" | base = center; size = {L-L/resolution*2, L-L/resolution*2}
    pard1: PartitionDomains "分割域 1"
      domain = r1(1) domains 1
      partitionwith = extendededges
      extendededge = r2(1) boundaries 1-4
    fin: Finalize "形成联合体"

Physics
  c: CoefficientFormPDE "系数形式偏微分方程" on all domains
    dependent variable E = {Rx, Sx, Ry, Sy}
    ShapeProperty.shapeFunctionType = shnserp
    ShapeProperty.order = 2
    ShapeProperty.boundaryFlux = 1
    ShapeProperty.boundaryFluxSmooth = 1
    ShapeProperty.frame = spatial
    EquationForm.form = Automatic
    Units.SourceTermQuantity = none
    Units.CustomSourceTermUnit = rad/um
    cfeq1: CoefficientFormPDE "系数形式偏微分方程 1" (default)
      c = {{0, 0, 0, 0}, {0, 0, 0, 0}, {0, 0, 0, 0}, {0, 0, 0, 0}, {0, 0, 0, 0}, {0, 0, 0, 0}, {0, 0, 0, 0}, {0, 0, 0, 0}, {0, 0, 0, 0}, {0, 0, 0, 0}, {0, 0, 0, 0}, {0, 0, 0, 0}, {0, 0, 0, 0}, {0, 0, 0, 0}, {0, 0, 0, 0}, {0, 0, 0, 0}}
      a = {-0.0414930864158+0.0228889680866j, -0.0111067652881+-0.131466042366j, -0.0401230900131+1.06630663734e-08j, -0.0358753546038+-0.000681537009008j, -0.0539783207693+0.147517500688j, -0.0414930864158+0.0228889696378j, -0.0358753546038+0.000681537009008j, -0.0401230900131+-1.06630663674e-08j, -0.0401230900131+-1.0292424535e-08j, -0.0358753546036+-0.000681537008904j, -0.0414930536077+0.0228889721054j, -0.0111067644566+-0.131466043765j, -0.0358753546036+0.000681537008904j, -0.0401230900131+1.02924245411e-08j, -0.0539783161146+0.147517535219j, -0.0414930536077+0.0228889736556j}
      f = {0, 0, 0, 0}
      da = {1, 0, 0, 0, 0, 1, 0, 0, 0, 0, 1, 0, 0, 0, 0, 1}
      be = {{1j, 0}, {0, 0}, {0, 0}, {0, 0}, {0, 0}, {-1j, 0}, {0, 0}, {0, 0}, {0, 0}, {0, 0}, {0, 1j}, {0, 0}, {0, 0}, {0, 0}, {0, 0}, {0, -1j}}
    zflx1: ZeroFluxBoundary "零通量 1" (default)
    init1: init "初始值 1" (default)
    dir1: DirichletBoundary "狄利克雷边界条件 1" on boundaries 1, 3, 5
      r = {0, 0, 0, 0}
      useDirichletCondition = {1, 0, 0, 0}
      weakConstraints = 0
      constraintMethod = nodal
    dir2: DirichletBoundary "狄利克雷边界条件 2" on boundaries 22-24
      r = {0, 0, 0, 0}
      useDirichletCondition = {0, 1, 0, 0}
      constraintMethod = nodal
    dir3: DirichletBoundary "狄利克雷边界条件 3" on boundaries 2, 9, 16
      r = {0, 0, 0, 0}
      useDirichletCondition = {0, 0, 1, 0}
      constraintMethod = nodal
    dir4: DirichletBoundary "狄利克雷边界条件 4" on boundaries 7, 14, 21
      r = {0, 0, 0, 0}
      useDirichletCondition = {0, 0, 0, 1}
      constraintMethod = nodal

Mesh
  mesh1 "网格 1"
    size: MeshSizeDefault "大小" | hmax = L/resolution; hmin = L/resolution; hgrad = 1; custom = on
    map1: Map "映射 1" on remaining entities

Studies
  std1 "研究 1"
    eigv: Eigenvalue "特征值" | shift = init_eig_guess; linpstudy = zero; linpsolnum = auto; neigs = 6

Solver configurations
  sol1 "解 1" (study std1)
    v1: Variables "因变量 1"
    e1: Eigenvalue "特征值求解器 1"
      dDef: Direct "直接"

Datasets
  dset1: Solution | solution = sol1

Derived values
  gev1: EvalGlobal "全局计算 1"
    data = dset1
    table = tbl7
    expr = {2*imag(lambda)*intall(abs(Rx)^2+abs(Sx)^2+abs(Ry)^2+abs(Sy)^2), intleftb(abs(Sx)^2)+intrightb(abs(Rx)^2)+intlowb(abs(Sy)^2)+intupb(abs(Ry)^2), intyd(abs(Sx)^2)+intyd(abs(Rx)^2)+intxd(abs(Sy)^2)+intxd(abs(Ry)^2), intall(dtang(abs(Rx)^2-abs(Sx)^2, x)+dtang(abs(Ry)^2-abs(Sy)^2, y))}
    unit = {m^2, m^2, m, m}
    descr = {P_stim, P_edge, P_edge2, P_edge3}

Tables
  tbl4: Table "表格 4"
    // 全局计算 2
    特征值 (rad/s) | P stim (1) | P edge (1)
    0.079765+0.0423349i | 0.358291 | 0.0954577
    0.0810299+0.0423017i | 0.357127 | 0.221205
    0.0810469+0.042295i | 0.357069 | 0.222922
    0.0824121+0.0422308i | 0.355677 | 0.371968
    0.0829054+0.0423065i | 0.355683 | 0.373226
    0.0829061+0.0423057i | 0.355636 | 0.374871
  tbl6: Table "表格 6"
    // 全局计算 3
    特征值 (rad/s) | Qfactor
    -0.244252+0.00970109i | 331.921
    -0.244252+0.0097011i | 331.92
    -0.243406+0.00955503i | 337.039
    -0.242255+0.00936777i | 343.838
    -0.242251+0.00936698i | 343.867
    -0.241071+0.0091699i | 351.322
  tbl7: Table "表格 7"
    // 全局计算 1
    特征值 (rad/s) | P_stim (m^2) | P_edge (m^2) | P_edge2 (m) | P_edge3 (m)
    -0.272587+0.0790622i | 115.68 | 78.3259 | 99.3461 | 99.3461
    -0.271533+0.0791029i | 117.193 | 79.6069 | 100.86 | 100.86
    -0.271468+0.0790672i | 116.985 | 78.5389 | 100.433 | 100.433
    -0.268267+0.0798885i | 118.894 | 80.3367 | 103.285 | 103.285
    -0.267672+0.0798677i | 119.393 | 80.6313 | 102.037 | 102.037
    -0.230264+0.0810038i | 125.539 | 86.3667 | 110.292 | 110.292

Plots
  pg1: PlotGroup2D "一般形式偏微分方程" | data = dset1
    surf1: Surface "表面 1" | expr = imag(Rx)
      hght1: Height "高度表达式 1" | expr = Rx
  pg2: PlotGroup2D "I" | data = dset1
    surf1: Surface "表面 1" | expr = abs(Rx)^2+abs(Sx)^2+abs(Ry)^2+abs(Sy)^2
  pg3: PlotGroup1D "一维绘图组 3" | data = dset1
    lngr2: LineGraph "线结果图 2" on boundaries 15, 17, 19

Exports
  img1: Image "图像 1" | size = manualweb; unit = px; width = 720; height = 720; pngfilename = res.png
  plot1: Plot "绘图 1" | filename = res.csv